table  # each column defines a variable
    Grade | ε_sc2 | ε_sc0 | ε_s0 | ε_s2 | R_sc (MPa) | R_s (MPa) | E (MPa)
    "A240" | -0.025 | -0.00105 | 0.00105 | 0.025 | -210 | 210 | 200000
    "A400" | -0.025 | -0.00175 | 0.00175 | 0.025 | -350 | 350 | 200000
    "A500" | -0.025 | -0.002 | 0.002175 | 0.025 | -400 | 435 | 200000
end table
