# Расчет перегородок по СП 15.13330.2020 "Каменные и армокаменные конструкции по п. 9.20 'Допустимые отношения высот стен и столбов к их толщинам' " при свободной длине между примыкающими стенами или колоннами
# (Таблица 9.3)
# Исходные данные
β_93(group, M) :=
    if group == "I"
        if M ≥ 50
            β ← 25
        else if M == 25
            β ← 22
        else if M == 10
            β ← 20
        else
            β ← 0
    else if group == "II"
        if M ≥ 50
            β ← 22
        else if M == 25
            β ← 20
        else if M == 10
            β ← 17
        else if M == 4
            β ← 15
        else
            β ← 0
    else if group == "III"
        if M == 25
            β ← 17
        else if M == 10
            β ← 15
        else if M == 4
            β ← 14
        else
            β ← 0
    else
        if M == 10
            β ← 14
        else if M == 4
            β ← 13
        else
            β ← 0
    β
# (Таблица 9.1) группа кладки
group := "I"
# Марка раствора
M := 50
# Проём, 1 если есть,  0 если нет
B := 0
# Конструктивное армирование кладки, 1 если есть,  0 если нет
rf := 1  # (п. 9.23)
# Закрепление в верхнем сечении, 0 если есть,  1 если нет
top := 0  # (п. 9.24)
# (п. 9.10)
# перегородки - внутренние стены, воспринимающие нагрузки только от собственного веса и ветра (при открытых оконных проемах) в пределах одного этажа при высоте его не более 6 м
# Отношение высоты перегородки к толщине по табл. 9.3
β_0 := β_93(group, M) = 25  # (п. 9.21)
# Определение коэффициента k | (п. 9.22)
# Таблица 9.4 | (Таблица 9.5)
K_p(h) :=
    if h ≥ 90 cm
        k ← 0.75
    else if 89 cm ≥ h ≥ 70 cm
        k ← 0.7
    else if 50 cm ≥ h ≥ 69 cm
        k ← 0.65
    else
        k ← 0.6
    k
table  # each column defines a variable
    h_i (cm) | k1
    10 | 1.8
    25 | 1.2
end table
K_1(h) := linterp(h_i, k1, h)
# Таблица 9.4
# k4, k5 перегородки | k общий коэффициент снижения
K_45(h, l) :=
    if 2.5*β_0*h ≤ l ≤ 3.5*β_0*h
        k ← 0.9
    else if l > 3.5*β_0*h
        k ← 0.8
    else
        k ← 1
    k
K(h, l) :=
    if B ≠ 0
        K_3 ← 0.9
    else
        K_3 ← 1
    K ← K_1(h)*K_3*K_45(h, l)
    if K ≤ K_p(h)
        k ← K_p(h)
    else
        k ← K
    k
# Определение отношения β
# (п. 9.22)
β(h, l) := β_0*K(h, l) + β_0*K(h, l)%*(20*rf - 30*top)
# Определение предельной высоты перегородки
H_u(h, l) :=
    if l < β(h, l)*h
        H ← 9 m
    else if 2*β(h, l)*h ≥ l ≥ β(h, l)*h
        if β(h, l)*h > 3*β(h, l)*h - l
            H ← 3*β(h, l)*h - l
        else
            H ← β(h, l)*h
    else
        H ← β(h, l)*h
# (п. 9.23)
# Предельная высота перегородки в зависимости от толщины и свободной длины  (>=9 м - неограниченная высота, >=25 м - неограниченная свободная длина)
# Свободные длины перегородок
l := 1 m, 1.5 m .. 25 m
# [plot: H_u(100 mm, l), H_u(150 mm, l), H_u(200 mm, l), H_u(250 mm, l), H_u(300 mm, l) vs l (m)]
# Максимальные высоты и свободные длины перегородок для различных толщин
# Предельная высота перегородок при неограниченной свободной длине в зависимости от толщины
H_u(100 mm, 6.2 m) = 5.4 m
H_u(100 mm, 25 m) = 4.32 m
H_u(150 mm, 9.3 m) = 7.2 m
H_u(150 mm, 25 m) = 5.76 m
H_u(200 mm, 12.4 m) = 8.4 m
H_u(200 mm, 25 m) = 6.72 m
H_u(250 mm, 15.6 m) = 9 m
H_u(250 mm, 25 m) = 7.2 m
H_u(300 mm, 18.7 m) = 9 m
H_u(300 mm, 25 m) = 8.1 m
# Толщины перегородок
h := 100 mm, 150 mm .. 300 mm
# [plot: H_u(h, 25 m) vs h (mm)]
# Отношение высоты перегородок к толщине β в зависимости от толщины и длины
# [plot: β(h, 1 m), β(h, 25 m) vs h (mm)]
