# Расчёт на сейсмическое воздействие с применением консольной РДМ по линейно-спектральному методу
# СП 14.13330.2018 методом сил
# Расчётная динамическая модель РДМ
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# Модуль упругости бетона
E := 36000 MPa
# Плотность бетона
γ := 2750 kg/m^3
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# Количество диафрагм одного направления в блоке
n_d := 8
# Толщина диафрагм td
table  # each column defines a variable
    td (mm) | ld (m) | tp (mm) | la (m^2) | dlv (kPa) | llv (kPa) | x_i (m)
    300 | 7.2 | 200 | 1650 | 2 | 4 | 5.1
    300 | 7.2 | 200 | 1650 | 2 | 4 | 10.2
    300 | 7.2 | 200 | 1650 | 3 | 2 | 15.3
end table
# Длина диафрагм ld
# Толщина перекрытий tp
# Площади этажей la
# Постоянные нагрузки dlv
# Временные нагрузки llv
# Момент инерции диафрагм
I := vectorize(td*ld^3)/12*n_d
EI := E*I
n := rows(td) = 3
# Общая длина
L := x_i[n - 1] = 15.3 m
# коэффициент учёта других конструкций
k_w := 1.1
# Матрица масс
M :=
    for i ∈ 0 .. n - 1
        M[i, i] ← (tp[i]*γ + dlv[i]/g + llv[i]/g)*la[i]*k_w
    M
M = [2108.72, 0, 0; 0, 2108.72, 0; 0, 0, 1923.64] tonne
# Моменты от единичных сил
M_i(x, xi, S) :=
    if x ≤ xi
        M ← S*xi - S*x
    else
        M ← 0 kN*m
    M
# Матрица податливости
δ :=
    for i ∈ 0 .. n - 1
        for j ∈ 0 .. n - 1
            D[i, j] ← integral(M_i(x, x_i[i], 1 kN)*M_i(x, x_i[j], 1 kN)/EI[i], x = 0 m .. L)
    D
δ = [
    1.64606e-8, 4.11742e-8, 6.58299e-8;
    4.11742e-8, 1.31621e-7, 2.30376e-7;
    6.58299e-8, 2.30376e-7, 4.44246e-7
] kN*m
d := δ*M = [
    3.47109e-5, 8.68249e-5, 0.000126633;
    8.68249e-5, 0.000277552, 0.000443161;
    0.000138817, 0.000485798, 0.00085457
] tonne*kN·m
# Собственные значения
λ := eigenvals(d) = [0.00113514; 2.78452e-5; 3.84577e-6] tonne*kN·m
# Круговая частота | Период
ω := sqrt(1/λ) = [29.6808; 189.507; 509.927] 1/(s*kN)
T := 2*π/ω = [0.211692; 0.0331555; 0.0123217] kN*s
# Техническая частота
f := ω/(2*π) = [4.72384; 30.1609; 81.1574] 1/(s*kN)
# Собственные векторы
U := eigenvecs(d) = [-0.137345, -0.571014, -0.802976; -0.465668, -0.66231, 0.564473; -0.874237, 0.485065, -0.191312]
vx := stack(0 m, x_i) = [0; 5.1; 10.2; 15.3] m
vy :=
    for i ∈ 0 .. n - 1
        vy[i] ← stack(0, U[:, i])
    vy
    = [
        [0; -0.137345; -0.465668; -0.874237]; [0; -0.571014; -0.66231; 0.485065]; [0; -0.802976; 0.564473; -0.191312]
    ]
ci(i) := cspline(vx, vy[i])
U_i(x, i) := interp(ci(i), vx, vy[i], x)
# Формы колебаний
x := 0 m, L/100 .. L
# [plot: U_i(x, 0), U_i(x, 1), U_i(x, 2) vs x]
# Матрица весов масс
G := M*g = [20679.5, 0, 0; 0, 20679.5, 0; 0, 0, 18864.5] kN
E1 :=
    for i ∈ 0 .. n - 1
        E[i] ← 1
    E
    = [1; 1; 1]
# коэффициент, зависящий от формы деформации здания или сооружения при его собственных колебаниях по i-й форме, от узловой точки приложения рассчитываемой нагрузки и направления сейсмического воздействия
η :=
    for i ∈ 0 .. n - 1
        η[i] ← transpose(U[:, i])*G*E1/(transpose(U[:, i])*G*U[:, i])*U[:, i]
    η
    = [[0.206186; 0.699071; 1.31242]; [0.461098; 0.53482; -0.391694]; [0.332716; -0.233892; 0.0792708]]
# Проверка
η[0][0] + η[1][0] + η[2][0] = 1
η[0][1] + η[1][1] + η[2][1] = 1
η[0][2] + η[1][2] + η[2][2] = 1
# значение ускорения в уровне основания
As := 4 m/s^2
# коэффициент, учитывающий назначение сооружения и его ответственность
K_0 := 1.1
# коэффициент, учитывающий допускаемые повреждения зданий и сооружений
K_1 := 0.3
# коэффициент, учитывающий способность зданий и сооружений к рассеиванию энергии
K_Ψ := 1
# Категории грунтов
soil := 3
βi(T) :=
    if soil == 1
        if T ≤ 0.1 s
            β_i ← 1 + 15*T/s
        else if 0.1 s < T < 0.4 s
            β_i ← 2.5
        else
            β_i ← 2.5*(0.4*s/T)^0.5
    else
        if T ≤ 0.1 s
            β_i ← 1 + 15*T/s
        else if 0.1 s < T < 0.8 s
            β_i ← 2.5
        else
            β_i ← 2.5*(0.8*s/T)^0.5
    if β_i < 0.8
        β_i ← 0.8
    β_i
# Значения коэффициента динамичности
Ti := 0 s, 2 s/15 .. 4.5 s
# [plot: βi(Ti) vs Ti]
β :=
    for i ∈ 0 .. n - 1
        β[i] ← βi(T[i]/kN)
    β
    = [2.5; 1.49733; 1.18483]
S_0 :=
    for i ∈ 0 .. n - 1
        S_0[i] ← M*η[i]*As*β[i]*K_Ψ
    S_0
# Расчетная сейсмическая нагрузка
S := K_0*K_1*S_0 = [[1434.8; 4864.68; 8331.29]; [1921.78; 2229.05; -1489.24]; [1097.29; -771.37; 238.488]] kN
M__i(x, i) := sum(M_i(x, x_i[j], S[i][j, :][0]), j = 0 .. n - 1)
# Изгибающие моменты в диафрагмах по формам
# [plot: M__i(x, 0) (kN*m), M__i(x, 1) (kN*m), M__i(x, 2) (kN*m) vs x (m)]
M__i(0 m, 0) = 184406 kN*m
# Суммарная эпюра моментов
M__s(x, i) := sum(M_i(x, x_i[j], S[i][j, :][0]), j = 0 .. n - 1)^2
M_s(x) := sqrt(sum(M__s(x, j), j = 0 .. n - 1))
# [plot: M_s(x) (kN*m) vs x (m)]
M_s(0 m) = 184669 kN*m
# Перемещения от сейсмического воздействия
Δ :=
    for i ∈ 0 .. n - 1
        for j ∈ 0 .. n - 1
            Δ[i, j] ← integral(M_i(x, x_i[i], 1 kN)*M__i(x, j)/EI[i], x = 0 m .. L)
    Δ
Δ_i :=
    for i ∈ 0 .. n - 1
        for j ∈ 0 .. n - 1
            Δ_i[i] ← sqrt(sum(Δ[i, j]^2, j = 0 .. n - 1))/kN
    Δ_i
    = [0.772445; 2.61863; 4.9162] mm
vyΔ := stack(0, Δ_i) = [0; 0.772445; 2.61863; 4.9162] mm
c := cspline(vx, vyΔ)
Δi(x) := interp(c, vx, vyΔ, x)
# Перемещения
# [plot: Δi(x) (mm) vs x]
